Boxed Wing
#Mach
0.7
#IYsym IZsym Zsym
0  0  0
#Sref  Cref  Bref
200 7.978908733080942 37.30951621235526
#Xref Yref Zref
0.3  0.0  0.0806
CDdp
0.01

SURFACE
Wing
8  1.0  12  -2.0
YDUPLICATE
0.0
ANGLE
0.0
SECTION
0 0 0 7.978908733080942 0.0 0 0
SECTION
6.705439932878797 37.30951621235526 2.20786443654154 2.742216615297005 0.0 0 0
